# OpenSim document version 30000
Model MonkeyArm-meters-scaled-scaled:
  credits: Model authors names..
  publications: List of publications related to model...
  length_units: meters
  force_units: N
  gravity: 0 -9.80665 0
  BodySet:
    Body ground: mass=0 mass_center=(0 0 0) inertia_xx=0 inertia_yy=0 inertia_zz=0
      WrapEllipsoid THORAX: xyz_body_rotation=(0.0523599 -0.331962 0.189892) translation=(-0.005 -0.04 -0.035)
          quadrant=all dimensions=(0.045 0.055 0.025)
    Body sternum: mass=0.4992863 mass_center=(0 0 0) inertia_xx=0 inertia_yy=0 inertia_zz=0 meshes=sternum.vtp
      WeldJoint ground_sternum: parent_body=ground location_in_parent=(0 0 0) location=(0 0 0)
    Body clavicle: mass=0 mass_center=(0 0 0) inertia_xx=0 inertia_yy=0 inertia_zz=0 meshes=clavicle.vtp
      WeldJoint sterno_clavicle: parent_body=sternum location_in_parent=(0 0 0) location=(0 0 0)
    Body scapula: mass=0 mass_center=(0 0 0) inertia_xx=0 inertia_yy=0 inertia_zz=0 meshes=scapula.vtp
      WeldJoint clav_scapular: parent_body=clavicle location_in_parent=(0 0 0) location=(0 0 0)
    Body humerus: mass=0.01535683 mass_center=(0 -0.0531546 0) inertia_xx=2.033147e-5 inertia_yy=1.200459e-5
        inertia_zz=2.033147e-5 meshes=humerus.vtp
      CustomJoint shoulder: parent_body=scapula location_in_parent=(0 0.0019 0.00475) location=(0 0 0)
        Coordinate shoulder_adduction: motion_type=rotational default_value=0.08726646 range=(-1.745329 0.8726646)
            clamped=false
        Coordinate shoulder_rotation: motion_type=rotational default_value=0.08726646 range=(-1.396263 1.570796)
            clamped=false
        Coordinate shoulder_flexion: motion_type=rotational default_value=0.6283185 range=(-1.308997 1.570796)
            clamped=false
        SpatialTransform: axes_held_at_zero=(translation1 translation2 translation3)
          TransformAxis rotation1: coordinates=shoulder_adduction axis=(1 0 0) LinearFunction(coefficients=1 0)
          TransformAxis rotation2: coordinates=shoulder_rotation axis=(0 1 0) LinearFunction(coefficients=1 0)
          TransformAxis rotation3: coordinates=shoulder_flexion axis=(0 0 1) LinearFunction(coefficients=1 0)
      WrapCylinder ELBOW_EXTENSOR: xyz_body_rotation=(0 0.0523599 0) translation=(0.000213576 -0.116844 -0.00203328)
          quadrant=all radius=0.008619662 length=0.02394351
      WrapCylinder ELBOW_ANC: translation=(0.00095774 -0.117802 0.0047887) quadrant=-x radius=0.009577402
          length=0.0191548
      WrapEllipsoid SHOULDER_HUMERUS: translation=(0 0.00095774 0.00095774) quadrant=all
          dimensions=(0.0124506 0.00766192 0.0095774)
    Body ulna1: mass=0 mass_center=(0 0 0) inertia_xx=0 inertia_yy=0 inertia_zz=0
      CustomJoint elbow: parent_body=humerus location_in_parent=(0 -0.1197175 -0.002873221) location=(0 0 0)
        Coordinate elbow_flexion: motion_type=rotational default_value=0.8726646 range=(0.3490659 2.443461)
            clamped=false
        SpatialTransform: axes_held_at_zero=(rotation2 rotation3 translation1 translation2 translation3)
          TransformAxis rotation1: coordinates=elbow_flexion axis=(0 0 1) LinearFunction(coefficients=1 0)
    Body ulna: mass=0.006974878 mass_center=(0.00377975 -0.0425222 0.00377975) inertia_xx=9.65936e-6
        inertia_yy=1.398243e-6 inertia_zz=9.65936e-6 meshes=ulna.vtp
      WeldJoint ulna1: parent_body=ulna1 location_in_parent=(0 0 0) location=(0 0 0)
      WrapTorus ELBOW_ULNA: xyz_body_rotation=(-1.5708 0.785398 0) translation=(-0.0188988 0.019513 -0.00472469)
          quadrant=all inner_radius=0.00472469 outer_radius=0.01417407
    Body radius_jcc: mass=7.564943e-8 mass_center=(0 0 0) inertia_xx=6.827361e-9 inertia_yy=6.827361e-9
        inertia_zz=6.827361e-9
      CustomJoint ulnar_radial: parent_body=ulna location_in_parent=(0 -0.007559504 0.00472469)
          orientation_in_parent=(0.03551583 0 0.01308997) location=(0 0 0)
        Coordinate radial_pronation: motion_type=rotational default_value=0 range=(-1.570796 1.570796) clamped=false
            locked=true
        SpatialTransform: axes_held_at_zero=(rotation1 rotation3 translation1 translation2 translation3)
          TransformAxis rotation2: coordinates=radial_pronation axis=(0 1 0) LinearFunction(coefficients=1 0)
    Body radius: mass=0.004675135 mass_center=(0.0075595 -0.0425222 0.0075595) inertia_xx=6.437322e-6
        inertia_yy=9.32162e-8 inertia_zz=6.437322e-6 meshes=radius.vtp
      WeldJoint ulnar_radial_jcc: parent_body=radius_jcc location_in_parent=(0 0 0)
          orientation_in_parent=(-0.03551583 0 -0.01308997) location=(0 0 0)
      WrapEllipsoid RADIUS_SUP: xyz_body_rotation=(1.5708 0.0872665 0) translation=(0.00566963 -0.075595 -0.00472469)
          quadrant=all dimensions=(0.00566963 0.00566963 0.0472469)
      WrapCylinder BICEPS_SUP: xyz_body_rotation=(1.5708 0 0) translation=(0.000850444 -0.0190877 0) quadrant=-y
          radius=0.003779752 length=0.01606395
      WrapEllipsoid WRIST_1: translation=(0.00944938 -0.122842 0) quadrant=all
          dimensions=(0.0075595 0.0075595 0.00472469)
      WrapEllipsoid WRIST_2: translation=(0.00944938 -0.122842 0) quadrant=all
          dimensions=(0.0075595 0.0075595 0.0075595)
      WrapTorus WRIST_FLEXEXT: xyz_body_rotation=(1.5708 0 0) translation=(0.00472469 -0.127567 0.00661457)
          quadrant=all inner_radius=0.002834814 outer_radius=0.00472469
      WrapTorus WRIST_BREVIS: xyz_body_rotation=(1.5708 0 0) translation=(0.00812647 -0.127567 0.00600981) quadrant=all
          inner_radius=0.002834814 outer_radius=0.00472469
      WrapTorus WRIST_LONGUS: xyz_body_rotation=(1.5708 0 0) translation=(0.0152796 -0.127567 0.00496092) quadrant=all
          inner_radius=0.002834814 outer_radius=0.00472469
    Body radius1: mass=0 mass_center=(0 0 0) inertia_xx=0 inertia_yy=0 inertia_zz=0
      WeldJoint wrist_tmp: parent_body=radius location_in_parent=(0.006614566 -0.1247318 -0.001417407)
          orientation_in_parent=(-0.00060924 0 0) location=(0 0 0)
    Body hand: mass=0.003706822 mass_center=(0.0114 -0.02375 0.00665) inertia_xx=2.608052e-6 inertia_yy=1.065068e-7
        inertia_zz=2.608052e-6 meshes=hand.vtp
      CustomJoint wrist: parent_body=radius1 location_in_parent=(0 0 0) location=(0 0 0)
        Coordinate wrist_flexion: motion_type=rotational default_value=0 range=(-1.308997 1.570796) clamped=false
            locked=true
        Coordinate wrist_abduction: motion_type=rotational default_value=0 range=(-1.047198 0.7853982) clamped=false
            locked=true
        SpatialTransform: axes_held_at_zero=(rotation3 translation1 translation2 translation3)
          TransformAxis rotation1: coordinates=wrist_flexion axis=(1 0 0) LinearFunction(coefficients=1 0)
          TransformAxis rotation2: coordinates=wrist_abduction axis=(0 0 1) LinearFunction(coefficients=1 0)
  ForceSet:
    Schutte1993Muscle_Deprecated [values shared by the 39 below unless stated]: time_scale=0 activation1=0
        activation2=0 damping=0.05
      tendon_force_length_curve: SimmSpline: x=(-10 -0.002 -0.001 0 0.00131 0.00281 0.00431 0.00581 0.00731 0.00881 0.0103 0.0118 0.0123 9.2 9.201 9.202 20)
          y=(0 0 0 0 0.0108 0.0257 0.0435 0.0652 0.0915 0.123 0.161 0.208 0.227 345 345 345 345)
      active_force_length_curve: SimmSpline: x=(-35 0 0.401 0.402 0.4035 0.52725 0.62875 0.71875 0.86125 1.045 1.2175 1.43875 1.61875 1.62 1.621 2.2 35)
          y=(0 0 0 0 0 0.226667 0.636667 0.856667 0.95 0.993333 0.77 0.246667 0 0 0 0 0)
      passive_force_length_curve: SimmSpline: x=(-35 0.998 0.999 1.15 1.25 1.35 1.45 1.55 1.65 1.75 1.7501 1.7502 35)
          y=(0 0 0 0 0.035 0.12 0.26 0.55 1.17 2 2 2 2)
    Schutte1993Muscle_Deprecated abd_poll_longus: max_isometric_force=30 optimal_fiber_length=0.08489153
        tendon_slack_length=0.026956 pennation_angle_at_optimal=0 [radians] max_contraction_velocity=0.3
      PathPoint P1: ulna (-0.0127134 -0.0341416 0.00736107)
      PathPoint default: ulna (-0.00556709 -0.070304 0.00510592)
      PathPoint P3: radius (0.00639664 -0.122378 0.00669662)
      PathPoint P4: hand (0.00669569 -0.0051176 0.00673514)
      PathPoint P3: hand (0.011468 -0.0181174 0.00333435)
      PathWrap: wrap_object=RADIUS_SUP method=hybrid
    Schutte1993Muscle_Deprecated anconeus: max_isometric_force=30 optimal_fiber_length=0.009727335
        tendon_slack_length=0.01870649 pennation_angle_at_optimal=0 max_contraction_velocity=0.2392
      PathPoint P1: humerus (-0.00606092 -0.110191 0.00335119)
      PathPoint P2: ulna (-0.0090474 -0.0104469 0.00694193)
      PathWrap: wrap_object=ELBOW_ANC method=axial
    Schutte1993Muscle_Deprecated bicep_lh: max_isometric_force=58.2 optimal_fiber_length=0.1171193
        tendon_slack_length=0.06773764 pennation_angle_at_optimal=0.1221731 max_contraction_velocity=0.682
      PathPoint P1: scapula (-0.00134425 0.011088 -0.00400788)
      PathPoint P2: humerus (0.00798895 0.00593681 -0.00634537)
      PathPoint P2: humerus (0.0131566 0.000296105 -0.00240932)
      PathPoint P3: humerus (0.0145959 -0.00794734 0.00256078)
      PathPoint P4: humerus (0.0165983 -0.016889 0.0033348)
      PathPoint P4: humerus (0.0157165 -0.0890603 0.00116844)
      PathPoint P4: radius (-0.00296181 -0.0213742 -0.000469237)
      PathWrap: wrap_object=ELBOW_EXTENSOR method=hybrid
      PathWrap: wrap_object=BICEPS_SUP method=hybrid
      PathWrap: wrap_object=SHOULDER_HUMERUS method=hybrid
    Schutte1993Muscle_Deprecated bicep_sh: max_isometric_force=38.7 optimal_fiber_length=0.1171105
        tendon_slack_length=0.04065768 pennation_angle_at_optimal=0 max_contraction_velocity=0.84
      PathPoint P1: scapula (0.0047557 0.00382941 -0.00881646)
      PathPoint P2: humerus (0.0108671 -0.00756132 -0.00850828)
      PathPoint P2: humerus (0.0165803 -0.0156956 -0.00639447)
      PathPoint P2: humerus (0.0157165 -0.0890603 0.00116844)
      PathPoint P2: radius (-0.00296196 -0.0213737 -0.000469029)
      PathWrap: wrap_object=ELBOW_EXTENSOR method=hybrid
      PathWrap: wrap_object=SHOULDER_HUMERUS method=hybrid
      PathWrap: wrap_object=BICEPS_SUP method=hybrid
    Schutte1993Muscle_Deprecated brachialis: max_isometric_force=135.6 optimal_fiber_length=0.05451395
        tendon_slack_length=0.03349261 pennation_angle_at_optimal=0 max_contraction_velocity=0.529
      PathPoint P1: humerus (0.00860947 -0.0509352 0.00583381)
      PathPoint P2: ulna (-0.00651487 -0.0157902 -0.000111966)
      PathWrap: wrap_object=ELBOW_EXTENSOR method=hybrid
    Schutte1993Muscle_Deprecated brachioradialis: max_isometric_force=38.7 optimal_fiber_length=0.1160723
        tendon_slack_length=0.04107805 pennation_angle_at_optimal=0 max_contraction_velocity=1.453
      PathPoint P1: humerus (0.00230973 -0.0748169 0.0073592)
      PathPoint P2: radius (0.0137937 -0.027639 0.000734822)
      PathPoint P3: radius (0.0166824 -0.124889 0.00100573)
    Schutte1993Muscle_Deprecated coracobrachialis: max_isometric_force=38.7 optimal_fiber_length=0.08223307
        tendon_slack_length=0.001913688 pennation_angle_at_optimal=0.2268928 max_contraction_velocity=0.18
      PathPoint P1: scapula (0.0053973 0.00316009 -0.00936262)
      PathPoint P2: scapula (0.00715223 -0.00704164 0.000474316)
      PathPoint P3: humerus (0.00515064 -0.0270022 -0.001991)
      PathPoint P4: humerus (0.00983159 -0.038224 -0.000580429)
      PathPoint P3: humerus (0.00860847 -0.0509367 0.00583365)
      PathWrap: wrap_object=SHOULDER_HUMERUS method=hybrid
    Schutte1993Muscle_Deprecated deltoid_ant: max_isometric_force=135.6 optimal_fiber_length=0.04342369
        tendon_slack_length=0.001908734 pennation_angle_at_optimal=0 max_contraction_velocity=0.62
      PathPoint P1: clavicle (0.0114085 0.0189845 -0.0116913)
      PathPoint P2: scapula (0.0117891 0.0141012 0.00152363)
      PathPoint P3: humerus (0.0109808 -0.0336136 0.00564139)
      PathWrap: wrap_object=SHOULDER_HUMERUS method=axial
    Schutte1993Muscle_Deprecated deltoid_med: max_isometric_force=116.1 optimal_fiber_length=0.04877451
        tendon_slack_length=0.001911377 pennation_angle_at_optimal=0.3490659 max_contraction_velocity=0.31
      PathPoint P1: scapula (-0.00392442 0.0127708 0.00853018)
      PathPoint P2: scapula (-0.00266415 0.00975004 0.0141867)
      PathPoint P3: humerus (0.0123514 -0.0334879 0.00731759)
      PathWrap: wrap_object=SHOULDER_HUMERUS method=hybrid
    Schutte1993Muscle_Deprecated deltoid_pos: max_isometric_force=406.5 optimal_fiber_length=0.06586525
        tendon_slack_length=0.001909515 pennation_angle_at_optimal=0 max_contraction_velocity=0.604
      PathPoint P1: scapula (-0.0298442 0.00492107 -0.0109034)
      PathPoint P2: humerus (-0.0179043 -0.00774596 0.0127386)
      PathPoint P3: humerus (0.00491034 -0.032993 0.00995964)
    Schutte1993Muscle_Deprecated dorsoepitrochlearis: max_isometric_force=44.8 optimal_fiber_length=0.117227
        tendon_slack_length=0.0374883 pennation_angle_at_optimal=0 max_contraction_velocity=0.707
      PathPoint P1: scapula (0.00763525 -0.0309746 -0.00528386)
      PathPoint P2: humerus (-0.00184216 -0.0421353 -0.000555662)
      PathPoint P3: humerus (-0.00814311 -0.0987047 -0.00450647)
      PathPoint P2: ulna (-0.00922775 0.0095966 -0.00670405)
      PathWrap: wrap_object=ELBOW_EXTENSOR method=hybrid
    Schutte1993Muscle_Deprecated ext_carpi_rad_longus: max_isometric_force=72 optimal_fiber_length=0.1111255
        tendon_slack_length=0.05210489 pennation_angle_at_optimal=0.1553343 max_contraction_velocity=0.372
      PathPoint P1: humerus (2.24303e-5 -0.0845171 0.00667195)
      PathPoint P2: radius (0.00837175 -0.0254499 0.00769867)
      PathPoint P3: radius (0.0140229 -0.128502 0.00354352)
      PathPoint P4: hand (0.00766246 -0.0282401 0.00447689)
      PathWrap: wrap_object=ELBOW_EXTENSOR method=hybrid
    Schutte1993Muscle_Deprecated ext_carp_rad_brevis: max_isometric_force=30 optimal_fiber_length=0.1158175
        tendon_slack_length=0.03450889 pennation_angle_at_optimal=0.01745329 max_contraction_velocity=0.682
      PathPoint P1: humerus (0.00474864 -0.108826 0.0140614)
      PathPoint P2: radius (0.0084359 -0.122281 0.00695085)
      PathPoint P3: hand (0.00271819 -0.00779488 0.00508549)
      PathPoint P2: hand (0.00191029 -0.0270894 0.00408063)
      PathWrap: wrap_object=RADIUS_SUP method=axial
    Schutte1993Muscle_Deprecated ext_carpi_ulnaris: max_isometric_force=30 optimal_fiber_length=0.1157508
        tendon_slack_length=0.04761214 pennation_angle_at_optimal=0.06108652 max_contraction_velocity=0.227
      PathPoint P1: humerus (0.00474908 -0.111939 0.0117271)
      PathPoint P2: radius (-0.000243936 -0.127735 0.0035729)
      PathPoint P3: hand (-0.00503091 -0.0115025 0.00421232)
      PathWrap: wrap_object=RADIUS_SUP method=axial
    Schutte1993Muscle_Deprecated ext_digitorum: max_isometric_force=30 optimal_fiber_length=0.115848
        tendon_slack_length=0.04322123 pennation_angle_at_optimal=0.05235988 max_contraction_velocity=0.4557
      PathPoint P1: humerus (0.004315 -0.11 0.0140332)
      PathPoint P2: radius (0.00778326 -0.122658 0.00661366)
      PathPoint P3: hand (0.00100796 -0.00763801 0.00565246)
      PathPoint P2: hand (0.00211585 -0.0371631 0.00408251)
      PathWrap: wrap_object=RADIUS_SUP method=axial
    Schutte1993Muscle_Deprecated ext_digiti: max_isometric_force=30 optimal_fiber_length=0.1158421
        tendon_slack_length=0.0570264 pennation_angle_at_optimal=0.04537856 max_contraction_velocity=0.55
      PathPoint P1: humerus (0.000904011 -0.113807 0.0123253)
      PathPoint P2: radius (0.00258446 -0.120974 0.00739493)
      PathPoint P3: hand (-0.00471278 -0.0115444 0.00553892)
      PathPoint P2: hand (-0.0082721 -0.0260309 0.00408829)
      PathWrap: wrap_object=RADIUS_SUP method=axial
    Schutte1993Muscle_Deprecated ext_indicis: max_isometric_force=30 optimal_fiber_length=0.04167335
        tendon_slack_length=0.02931146 pennation_angle_at_optimal=0.1099557 max_contraction_velocity=0.4196
      PathPoint P1: ulna (-0.010087 -0.0632559 0.00407408)
      PathPoint P2: radius (0.00251802 -0.104009 0.00535971)
      PathPoint P3: radius (0.00465854 -0.12562 0.00247574)
      PathPoint P4: hand (0.00640386 -0.0203259 0.00620594)
    Schutte1993Muscle_Deprecated flex_carpi_radialis: max_isometric_force=60 optimal_fiber_length=0.1157987
        tendon_slack_length=0.04020793 pennation_angle_at_optimal=0.05410521 max_contraction_velocity=0.2697
      PathPoint P1: humerus (0.000583235 -0.117519 -0.00932696)
      PathPoint P2: radius (0.0102367 -0.12412 -0.00599369)
      PathPoint P3: hand (0.0102345 -0.0108796 -0.00017898)
      PathWrap: wrap_object=RADIUS_SUP method=axial
    Schutte1993Muscle_Deprecated flex_carpi_ulnaris: max_isometric_force=96 optimal_fiber_length=0.0421857
        tendon_slack_length=0.1157782 pennation_angle_at_optimal=0.2111848 max_contraction_velocity=0.227
      PathPoint P1: ulna (-0.00591904 -0.00545145 -0.00499472)
      PathPoint P2: radius (0.00155575 -0.12401 -0.00661966)
      PathPoint P3: hand (-0.00328891 -0.00864971 -0.00182733)
      PathWrap: wrap_object=RADIUS_SUP method=axial
    Schutte1993Muscle_Deprecated flex_digit_profundus: max_isometric_force=30 optimal_fiber_length=0.05799592
        tendon_slack_length=0.0381035 pennation_angle_at_optimal=0.1204277 max_contraction_velocity=0.6083
      PathPoint P1: ulna (-0.0086041 -0.0435066 0.000898041)
      ConditionalPathPoint P2: radius (0.00699254 -0.115679 -0.00680355) range=(-1.5708 0.352382)
          coordinate=radial_pronation
      PathPoint P3: radius (0.0103393 -0.126586 -0.00620242)
      PathPoint P4: hand (-0.00132175 -0.0163859 -0.00103476)
      PathWrap: wrap_object=RADIUS_SUP method=axial
    Schutte1993Muscle_Deprecated flex_digit_superficialis: max_isometric_force=30 optimal_fiber_length=0.1159031
        tendon_slack_length=0.06829176 pennation_angle_at_optimal=0.09599311 max_contraction_velocity=0.5306
      PathPoint P1: humerus (-0.00343829 -0.11695 -0.0109757)
      PathPoint P2: radius (0.010878 -0.125357 -0.00779212)
      PathPoint P3: hand (-0.000572727 -0.0355114 -0.000779)
      PathWrap: wrap_object=RADIUS_SUP method=axial
    Schutte1993Muscle_Deprecated flex_poll_longus: max_isometric_force=30 optimal_fiber_length=0.02654269
        tendon_slack_length=0.05751908 pennation_angle_at_optimal=0.1209513 max_contraction_velocity=0.5944
      PathPoint P1: radius (0.00503463 -0.0409184 -0.00627385)
      PathPoint P2: radius (0.00831545 -0.124411 -0.00730437)
      PathPoint P3: hand (0.00301144 -0.0172852 -0.00116482)
      PathWrap: wrap_object=WRIST_2 method=hybrid
      PathWrap: wrap_object=RADIUS_SUP method=axial
    Schutte1993Muscle_Deprecated infraspinatus: max_isometric_force=174.3 optimal_fiber_length=0.04699335
        tendon_slack_length=0.001902064 pennation_angle_at_optimal=0.2617994 max_contraction_velocity=0.29
      PathPoint P1: scapula (-0.0162272 -0.0319597 -0.0273284)
      PathPoint P2: humerus (0.00628362 -0.00467824 0.00987286)
    Schutte1993Muscle_Deprecated lat_dorsi_sup: max_isometric_force=129 optimal_fiber_length=0.116799
        tendon_slack_length=0.001907047 pennation_angle_at_optimal=0 max_contraction_velocity=1.15
      PathPoint P1: scapula (-0.0492147 -0.0536465 -0.0466181)
      PathPoint P2: scapula (-0.0325972 -0.0361643 -0.0197901)
      PathPoint P3: scapula (-0.0132591 -0.0244628 -0.00970662)
      PathPoint P2: humerus (0.00200293 -0.0258277 0.00753822)
      PathWrap: wrap_object=THORAX method=hybrid
    Schutte1993Muscle_Deprecated lat_dorsi_cen: max_isometric_force=129 optimal_fiber_length=0.1063343
        tendon_slack_length=0.001900523 pennation_angle_at_optimal=0 max_contraction_velocity=1.15
      PathPoint P1: scapula (-0.0376091 -0.0801911 -0.0380919)
      PathPoint P2: scapula (-0.0249018 -0.0519733 -0.0170514)
      PathPoint P3: scapula (-0.00877719 -0.034776 -0.00805364)
      PathPoint P2: humerus (0.00217601 -0.0256778 0.00743109)
      PathWrap: wrap_object=THORAX method=hybrid
    Schutte1993Muscle_Deprecated lat_dorsi_inf: max_isometric_force=129 optimal_fiber_length=0.1162602
        tendon_slack_length=0.008256844 pennation_angle_at_optimal=0 max_contraction_velocity=1.15
      PathPoint P1: scapula (-0.0214605 -0.111684 -0.0267822)
      PathPoint P2: scapula (-0.0180603 -0.0690056 -0.0174418)
      PathPoint P3: scapula (-0.0063799 -0.0451875 -0.00812955)
      PathPoint P2: humerus (0.00219111 -0.0257493 0.00735906)
      PathWrap: wrap_object=THORAX method=hybrid
    Schutte1993Muscle_Deprecated palmaris_longus: max_isometric_force=27 optimal_fiber_length=0.1158274
        tendon_slack_length=0.02213347 pennation_angle_at_optimal=0.06108652 max_contraction_velocity=0.5001
      PathPoint P1: humerus (-0.00343946 -0.116952 -0.0109818)
      PathPoint P2: radius (0.00999744 -0.120092 -0.00651062)
      PathPoint P3: radius (0.0105832 -0.124487 -0.00570853)
      PathPoint P4: hand (0.000590463 -0.0116851 -0.00185725)
      PathWrap: wrap_object=RADIUS_SUP method=axial
    Schutte1993Muscle_Deprecated pectoralis_sup: max_isometric_force=154.8 optimal_fiber_length=0.0515645
        tendon_slack_length=0.001906266 pennation_angle_at_optimal=0 max_contraction_velocity=0.967
      PathPoint P1: clavicle (0.0281735 0.00210611 -0.0343642)
      PathPoint P2: clavicle (0.0194194 -0.0112045 -0.00941006)
      PathPoint P2: humerus (0.00892508 -0.0338016 0.00312786)
      PathWrap: wrap_object=THORAX method=hybrid
      PathWrap: wrap_object=SHOULDER_HUMERUS method=hybrid
    Schutte1993Muscle_Deprecated pectoralis_inf: max_isometric_force=116.1 optimal_fiber_length=0.0638397
        tendon_slack_length=0.001970361 pennation_angle_at_optimal=0 max_contraction_velocity=0.5453
      PathPoint P1: sternum (0.0331677 -0.0140839 -0.04725)
      PathPoint P3: sternum (0.0220229 -0.0186303 -0.00738581)
      PathPoint P2: humerus (0.00856075 -0.0373512 0.0030866)
      PathWrap: wrap_object=THORAX method=hybrid
      PathWrap: wrap_object=SHOULDER_HUMERUS method=hybrid
    Schutte1993Muscle_Deprecated pronator_quad: max_isometric_force=33.3 optimal_fiber_length=0.02389181
        tendon_slack_length=0.001889876 pennation_angle_at_optimal=0.1727876 max_contraction_velocity=0.2373
      PathPoint P1: ulna (-0.00576226 -0.088477 -0.00154187)
      PathPoint P3: radius (0.00776122 -0.0907022 -0.00576765)
    Schutte1993Muscle_Deprecated pronator_teres: max_isometric_force=48.3 optimal_fiber_length=0.03929861
        tendon_slack_length=0.01184626 pennation_angle_at_optimal=0.2268928 max_contraction_velocity=0.2808
      PathPoint P1: humerus (0.00153099 -0.114956 -0.00979941)
      PathPoint P2: radius (0.00680448 -0.0427086 -0.00655074)
    Schutte1993Muscle_Deprecated subscapularis: max_isometric_force=290.4 optimal_fiber_length=0.04976735
        tendon_slack_length=0.008388919 pennation_angle_at_optimal=0.3839724 max_contraction_velocity=0.228
      PathPoint P1: scapula (-0.0381704 -0.0155379 -0.0412417)
      PathPoint P2: humerus (0.00436125 0.00436005 -0.00817577)
    Schutte1993Muscle_Deprecated supinator: max_isometric_force=30 optimal_fiber_length=0.04270325
        tendon_slack_length=0.00189342 pennation_angle_at_optimal=0.296706 max_contraction_velocity=0.2958
      PathPoint P1: humerus (0.00144674 -0.110602 0.0140023)
      PathPoint P2: radius (0.00638119 -0.0293375 -0.00160978)
    Schutte1993Muscle_Deprecated supraspinatus: max_isometric_force=135 optimal_fiber_length=0.0658965
        tendon_slack_length=0.001902379 pennation_angle_at_optimal=0.2617994 max_contraction_velocity=0.275
      PathPoint P1: scapula (-0.0379705 0.00836472 -0.0309438)
      PathPoint P2: scapula (-0.00667168 0.0163248 -0.00371115)
      PathPoint P3: humerus (0.0100968 0.00817186 0.00806897)
      PathWrap: wrap_object=SHOULDER_HUMERUS method=hybrid
    Schutte1993Muscle_Deprecated teres_major: max_isometric_force=77.4 optimal_fiber_length=0.07758379
        tendon_slack_length=0.001903897 pennation_angle_at_optimal=0.2443461 max_contraction_velocity=0.688
      PathPoint P1: scapula (-0.0426471 -0.0363757 -0.0255717)
      PathPoint P2: scapula (-0.00692466 -0.0182946 -0.00504437)
      PathPoint P2: humerus (0.00846646 -0.0272399 0.000636964)
    Schutte1993Muscle_Deprecated teres_minor: max_isometric_force=174 optimal_fiber_length=0.03830703
        tendon_slack_length=0.001901338 pennation_angle_at_optimal=0.2094395 max_contraction_velocity=0.19
      PathPoint P1: scapula (-0.0316379 -0.0104407 -0.0141992)
      PathPoint P2: scapula (-0.0159575 -0.00157398 0.000913111)
      PathPoint P3: scapula (-0.011919 0.00287177 0.0108564)
      PathPoint P2: humerus (-0.00283167 0.00722664 0.00888231)
      PathWrap: wrap_object=SHOULDER_HUMERUS method=hybrid
    Schutte1993Muscle_Deprecated tricep_lat: max_isometric_force=135.6 optimal_fiber_length=0.1171062
        tendon_slack_length=0.01759958 pennation_angle_at_optimal=0.3665191 max_contraction_velocity=0.521
      PathPoint P1: humerus (0.00329085 -0.0115362 0.00783247)
      PathPoint P2: humerus (-0.00633184 -0.0461881 0.00808712)
      PathPoint P3: humerus (-0.0161858 -0.100534 -0.00596672)
      PathPoint P2: ulna (-0.0150679 0.00833123 -0.00485435)
      PathWrap: wrap_object=ELBOW_EXTENSOR method=hybrid
      PathWrap: wrap_object=ELBOW_ULNA method=hybrid
    Schutte1993Muscle_Deprecated tricep_lon: max_isometric_force=116.1 optimal_fiber_length=0.101454
        tendon_slack_length=0.03443637 pennation_angle_at_optimal=0.5410521 max_contraction_velocity=0.446
      PathPoint P1: scapula (-0.0249562 -0.0152685 -0.00961324)
      PathPoint P2: humerus (-0.00905803 -0.0459322 0.00343502)
      PathPoint P2: humerus (-0.0161858 -0.100534 -0.00596672)
      PathPoint P2: ulna (-0.0148987 0.00784794 -0.00528081)
      PathWrap: wrap_object=ELBOW_EXTENSOR method=hybrid
      PathWrap: wrap_object=ELBOW_ULNA method=hybrid
    Schutte1993Muscle_Deprecated tricep_sho: max_isometric_force=135.6 optimal_fiber_length=0.0894165
        tendon_slack_length=0.009744486 pennation_angle_at_optimal=0.3141593 max_contraction_velocity=0.485
      PathPoint P1: humerus (0.00164535 -0.0403304 0.00488173)
      PathPoint P2: humerus (-0.00676614 -0.0697325 -0.00332936)
      PathPoint P3: humerus (-0.0161858 -0.100534 -0.00596672)
      PathPoint P2: ulna (-0.0152564 0.00828194 -0.00476016)
      PathWrap: wrap_object=ELBOW_EXTENSOR method=hybrid
      PathWrap: wrap_object=ELBOW_ULNA method=hybrid
    ObjectGroup wrist_flexor: members=(abd_poll_longus flex_carpi_ulnaris flex_digit_profundus flex_digit_superficialis flex_poll_longus palmaris_longus)
    ObjectGroup wrist_abductor: members=(abd_poll_longus ext_carp_rad_brevis ext_carpi_rad_longus ext_digiti ext_digitorum ext_indicis flex_carpi_radialis)
    ObjectGroup elbow_extensor: members=(anconeus dorsoepitrochlearis ext_carpi_rad_longus tricep_lat tricep_lon tricep_sho)
    ObjectGroup shoulder_abductor: members=(bicep_lh deltoid_ant deltoid_med deltoid_pos supraspinatus)
    ObjectGroup shoulder_flexor: members=(bicep_lh bicep_sh coracobrachialis deltoid_ant pectoralis_inf pectoralis_sup)
    ObjectGroup elbow_flexor: members=(bicep_lh bicep_sh brachialis brachioradialis flex_carpi_radialis palmaris_longus pronator_teres)
    ObjectGroup supinator: members=(bicep_lh bicep_sh brachioradialis supinator)
    ObjectGroup shoulder_adductor: members=(bicep_sh coracobrachialis dorsoepitrochlearis lat_dorsi_cen lat_dorsi_inf lat_dorsi_sup pectoralis_inf pectoralis_sup teres_major tricep_lat)
    ObjectGroup pronator: members=(brachioradialis flex_carpi_radialis pronator_quad pronator_teres)
    ObjectGroup shoulder_inrot: members=(deltoid_ant lat_dorsi_cen lat_dorsi_inf lat_dorsi_sup pectoralis_inf pectoralis_sup subscapularis teres_major)
    ObjectGroup shoulder_exrot: members=(deltoid_pos teres_minor)
    ObjectGroup shoulder_extensor: members=(deltoid_pos dorsoepitrochlearis lat_dorsi_cen lat_dorsi_inf lat_dorsi_sup teres_major tricep_lat)
    ObjectGroup wrist_extensor: members=(ext_carp_rad_brevis ext_carpi_rad_longus ext_carpi_ulnaris ext_digiti ext_digitorum ext_indicis flex_carpi_radialis)
    ObjectGroup wrist_adductor: members=(ext_carpi_ulnaris flex_carpi_ulnaris)
    ObjectGroup shouler_exrot: members=infraspinatus
  MarkerSet:
    Marker Marker_8: humerus (0.00659258 -0.0409677 -0.000304903)
    Marker Marker_7: humerus (0.00585789 -0.0744136 0.00329807)
    Marker Marker_6: ulna (-0.00944938 0 0.00472469) fixed=true
    Marker Marker_4: radius (0.0114115 -0.128713 0.00409158)
    Marker Marker_5: radius (-0.0075697 -0.129612 0.0074852)
    Marker Marker_2: hand (0.00711824 -0.0335891 -0.00154655)
    Marker Marker_3: hand (-0.00837464 -0.0278312 0.00406111)
    Marker Marker_1: hand (0.00749234 -0.0692832 0.00338764)
    Marker Shoulder_JC: humerus (0.00187184 -0.00221779 -0.00421309)
    Marker Pronation_Pt1: ulna (0.00182898 -0.00933192 0.00923796)
