# OpenSim document version 30000
InverseKinematicsTool:
  results_directory: ./
  constraint_weight: Inf
  accuracy: 1e-5
  marker_file: trial_3.trc
  time_range: 0 28.06
  report_errors: true
  report_marker_locations: false
  IKTaskSet:
    IKMarkerTask Marker_8: apply=true weight=1
    IKMarkerTask Marker_7: apply=true weight=1
    IKMarkerTask Marker_6: apply=true weight=1
    IKMarkerTask Marker_4: apply=true weight=1
    IKMarkerTask Marker_5: apply=true weight=1
    IKMarkerTask Marker_2: apply=true weight=0
    IKMarkerTask Marker_3: apply=true weight=0
    IKMarkerTask Marker_1: apply=true weight=0
    IKMarkerTask Shoulder_JC: apply=true weight=1
    IKMarkerTask Pronation_Pt1: apply=true weight=1
