# OpenSim document version 30000
ScaleTool MonkeyArm-meters-scaled-scaled:
  mass: 0.53 [kg]
  height: -1
  age: -1
  ModelScaler:
    apply: true
    scaling_order: measurements manualScale
    marker_file: C:/Users/alessandro/Documents/universita/phd/mathislab/DeepDraw/monkey_task/Chan_moran_scaled_model/Han/../../monkey_trc_new/Han_20170203_trc/trial_100.trc
    time_range: 0 2.37
    preserve_mass_distribution: true
    MeasurementSet:
      Measurement humerus: apply=true
        MarkerPair: markers=(Shoulder_JC Marker_6)
        BodyScale humerus: axes=(X Y Z)
      Measurement radius: apply=true
        MarkerPair: markers=(Marker_6 Marker_5)
        BodyScale ulna1: axes=(X Y Z)
        BodyScale ulna: axes=(X Y Z)
        BodyScale radius: axes=(X Y Z)
      Measurement fingers: apply=false
        MarkerPair: markers=(Marker_5 Marker_1)
    ScaleSet:
      Scale: scales=(1.44 1.44 1.44) segment=clavicle apply=true
      Scale: scales=(1.44 1.44 1.44) segment=scapula apply=true
      Scale: scales=(1.445 1.445 1.445) segment=humerus apply=true
      Scale: scales=(1.16 1.16 1.16) segment=ulna1 apply=true
      Scale: scales=(1.16 1.16 1.16) segment=ulna apply=true
      Scale: scales=(1.16 1.16 1.16) segment=radius_jcc apply=true
      Scale: scales=(1.16 1.16 1.16) segment=radius apply=true
      Scale: scales=(1.16 1.16 1.16) segment=radius1 apply=true
      Scale: scales=(1.16 1.16 1.16) segment=hand apply=true
  MarkerPlacer:
    apply: true
    marker_file: C:/Users/alessandro/Documents/universita/phd/mathislab/DeepDraw/monkey_task/Chan_moran_scaled_model/Han/../../monkey_trc_new/Han_20170203_trc/trial_100.trc
    time_range: 0 2.28
    max_marker_movement: -1
    IKTaskSet:
      IKMarkerTask Marker_8: apply=false weight=1
      IKMarkerTask Marker_7: apply=false weight=1
      IKMarkerTask Marker_6: apply=true weight=1
      IKMarkerTask Marker_4: apply=true weight=1
      IKMarkerTask Marker_5: apply=true weight=1
      IKMarkerTask Marker_2: apply=true weight=1
      IKMarkerTask Marker_3: apply=true weight=1
      IKMarkerTask Marker_1: apply=true weight=1
      IKMarkerTask Shoulder_JC: apply=true weight=1
      IKMarkerTask Pronation_Pt1: apply=true weight=1
